/com, -------
/com, ------- 2D_analysis_Beam_element

FINISH
/CLEAR

/com, ------- Preprocessing
/PREP7


/com, ------- Material
MP,ex,1,206800*1000000
mp,prxy,1,0.33
MP,DENS,1,7830

/com Mesh Density
n = 10

/com, ------- Elementtyp
ET,1,BEAM188,0,0,2

/com, ------- Crosssection data
Sectype,1,Beam,Rect,,0
SECDATA,.01,.01
K,1,0,0
K,2,1,0
L,1,2
LESIZE,1,,,n
LMESH,1


/SOLU
ANTYPE,2

/com Boundaries
D,1,ALL,0

D,ALL,UZ,0
D,ALL,ROTX,0


MODOPT,SUBSP,5

MXPAND,5

EQSLV,PCG

SOLVE

/POST1

SET,List
SET,First
SET,Next
!SET,Next
!SET,Next
!SET,Last
PLDISP

ANMode,10,0.5,,0

*use,modeshape.mac,1,2,3,4,1
