/com, ------- Nonlinear Cantilever
/com, ------- 2D analysis with end load and moment

FINISH
/CLEAR

/com, ------- Preprocessing
/PREP7

/com, ------- Material
MP,ex,1,3000
MP,nuxy,1,0.2

/com, ------- Elementtyps
ET,1,plane183,0
ET,2,solid185,,3

/com, Quarter circular ring area
CYL4,0,0,80,0,40,90,0


/com, ------- Mesh
LESIZE,1,,,4
LESIZE,2,,,2
AMESH,1

/com EXTRUDE
ESIZE,,50
TYPE,1,2
VEXT,1,,,,,1000

NUMCMP,ALL

/com Volume Symmetry
VSYMM,Y,ALL

/com delete first area
ASEL,S,,,1
ACLEAR,all
ALLSEL

/com, ----- Solution
/SOLU

/com, ------- Boundary Conditions
NSEL,S,loc,x,0
D,all,ux,0
ALLSEL
NSEL,S,loc,y,0
NSEL,R,loc,z,0
D,all,uy,0
ALLSEL
NSEL,S,loc,z,0
D,all,uz,0
ALLSEL
NSEL,S,loc,z,1000
CP,NEXT,ALL,ALL
ALLSEL

/com, Load
nn = node(0,80,500)
f,nn,FY,-40000


SFA,P,1,PRES,0
SFTRAN

SOLVE

/com, ----- Postprocessing
/POST1
PLNSOL,u,y,2
NSEL,S,loc,y,0
NSEL,R,loc,x,0
ALLSELL
PRNSOL,u,y,2
