/com, ------- Hertz Kontakt
/com, ------- 2D analysis to approximate Hertz Kontakt problem

FINISH
/CLEAR

/com, ------- Preprocessing
/PREP7

/com, ------- Material
MP,ex,1,210000
MP,nuxy,1,0.3

/com, ------- Elementtyps
ET,1,plane182,3,,1

/com,  Geometry
K,1,0,100
K,2,0,0
K,3,100,100
K,4,0,-1
K,5,100,-1
L,1,2
L,1,3
LARC,2,3,1,100
A,1,2,3
LDIV,3,3/10
L,4,5

/com, ------- Mesh
LESIZE,1,,,12
LESIZE,2,,,8
LESIZE,3,,,12
LESIZE,4,,,8
AMESH,1
KREFINE,2,0,,,5

/COM, CONTACT PAIR CREATION - START
CM,_NODECM,NODE
CM,_ELEMCM,ELEM
CM,_KPCM,KP
CM,_LINECM,LINE
CM,_AREACM,AREA
CM,_VOLUCM,VOLU
/GSAV,cwz,gsav,,temp
MP,MU,1,
MAT,1
R,3
REAL,3
ET,2,169
ET,3,172
KEYOPT,3,9,0
KEYOPT,3,10,0
R,3,
RMORE,
RMORE,,0
RMORE,0
! Generate the target surface
LSEL,S,,,5
CM,_TARGET,LINE
TYPE,2
LATT,-1,3,2,-1
TYPE,2
LMESH,ALL
! Generate the contact surface
LSEL,S,,,3
CM,_CONTACT,LINE
TYPE,3
NSLL,S,1
ESLN,S,0
ESURF
*SET,_REALID,3
ALLSEL
ESEL,ALL
ESEL,S,TYPE,,2
ESEL,A,TYPE,,3
ESEL,R,REAL,,3
LSEL,S,REAL,,3
/PSYMB,ESYS,1
/PNUM,TYPE,1
/NUM,1
EPLOT
! Reverse target normals
CM,_Y,LINE
LSEL, , , ,       5
CM,_YEL,ELEM
CM,_YND,NODE
NSLL,S,1
ESLN,S,1
ESEL,R,REAL,,_REALID
ESURF,,REVERSE
CMSEL,S,_Y
CMSEL,S,_YEL
CMSEL,S,_YND
CMDELE,_Y
CMDELE,_YEL
CMDELE,_YND
/REPLOT
!*
ESEL,ALL
ESEL,S,TYPE,,2
ESEL,A,TYPE,,3
ESEL,R,REAL,,3
LSEL,S,REAL,,3
/PSYMB,ESYS,1
/PNUM,TYPE,1
/NUM,1
EPLOT
ESEL,ALL
ESEL,S,TYPE,,2
ESEL,A,TYPE,,3
ESEL,R,REAL,,3
LSEL,S,REAL,,3
CMSEL,A,_NODECM
CMDEL,_NODECM
CMSEL,A,_ELEMCM
CMDEL,_ELEMCM
CMSEL,S,_KPCM
CMDEL,_KPCM
CMSEL,S,_LINECM
CMDEL,_LINECM
CMSEL,S,_AREACM
CMDEL,_AREACM
CMSEL,S,_VOLUCM
CMDEL,_VOLUCM
/GRES,cwz,gsav
CMDEL,_TARGET
CMDEL,_CONTACT
/COM, CONTACT PAIR CREATION - END

RMODIF,3,3,10

/com, -------- Definition of components
LSEL,s,line,,2
NSLL,s,1
CM,moveline,NODE
ALLSEL

LSEL,s,line,,1
NSLL,s,1
CM,symline,NODE
ALLSEL

LSEL,s,line,,5
NSLL,s,1
CM,rigid,NODE
ALLSEL


/com, ------- Solution
/SOLU

NCNV,2
NLGEOM, on

/com, ----- Loadstep 1, touching
TIME,1
CMSEL,s,moveline
D,ALL,uy,-1
ALLSEL

CMSEL,s,symline
D,ALL,ux,0
ALLSEL

CMSEL,s,rigid
D,ALL,uy,0
ALLSEL

/com , Limits of substep control
NSUBST ,10 ,20 ,5
/com , Load step identification
/com , Automatic substep control
AUTOTS ,on
/com , Solving the load step
OUTRES,ALL,ALL
SOLVE


/com, ----- deformation
TIME,2
/com Boundary contidions
CMSEL,s,moveline
D,ALL,uy,-1.1
ALLSEL

CMSEL,s,symline
D,ALL,ux,0
ALLSEL

CMSEL,s,rigid
D,ALL,uy,0
ALLSEL
/com , Considering nonlinear
/com , effects
NLGEOM ,on
/com , Limits of substep control
NSUBST ,100 ,1000 ,80
/com , Load step identification
/com , time
/com , Automatic substep control
AUTOTS ,on
/com , Solving the load step
OUTRES,ALL,ALL
SOLVE

/com... Postprocessing
/POST1

/com.. Deformation in y
PLNSOL,u,y,2

/com... von Mises
PLNSOL,s,eqv,2

/com... Reacting force
PRRSOL,fy
