/com, ------- 2D cylindir kontakt
/com, -------

FINISH
/CLEAR

/com, ------- Preprocessing
/PREP7

/com, ------- Material
MP,ex,1,180000
MP,nuxy,1,0.28

MP,ex,2,210000
MP,nuxy,2,0.3

/com, ------- Elementtyps
ET,1,plane182,3,,2

MAT,1
/com,  Geometry
K,1,0,100
K,2,0,0
K,3,100,100
L,1,2
L,1,3
LARC,2,3,1,100
A,1,2,3
LDIV,3,3/10

/com, ------- Mesh
LESIZE,1,,,12
LESIZE,2,,,8
LESIZE,3,,,12
LESIZE,4,,,8
AMESH,1
KREFINE,2,,,5


MAT,2
/com,  Geometry
K,5,0,-130
K,6,0,-10
K,7,120,-130
L,5,6
L,5,7
LARC,6,7,5,120
A,5,6,7
LDIV,7,3/10

/com, ------- Mesh
LESIZE,6,,,8
LESIZE,7,,,12
LESIZE,8,,,8
LESIZE,5,,,8
AMESH,2
KREFINE,6,,,5


/com Rigid Planes
!K,9,0,120
!K,10,0,100
!K,11,150,100
!K,12,150,120
!L,9,12
!L,9,10
!L,10,11
!L,11,12
!A,11,10,9,12

!K,13,0,-130
!K,14,0,-150
!K,15,150,-130
!K,16,150,-150
!A,13,14,16,15


/COM, CONTACT PAIR CREATION - START
CM,_NODECM,NODE
CM,_ELEMCM,ELEM
CM,_KPCM,KP
CM,_LINECM,LINE
CM,_AREACM,AREA
CM,_VOLUCM,VOLU
/GSAV,cwz,gsav,,temp
MP,MU,1,
MAT,1
MP,EMIS,1,7.88860905221e-31
R,3
REAL,3
ET,2,169
ET,3,172
KEYOPT,3,9,0
KEYOPT,3,10,0
R,3,
RMORE,
RMORE,,0
RMORE,0
RMORE,,,,,,1.0
! Generate the target surface
LSEL,S,,,7
CM,_TARGET,LINE
TYPE,2
NSLL,S,1
ESLN,S,0
ESURF
CMSEL,S,_ELEMCM
! Generate the contact surface
LSEL,S,,,3
CM,_CONTACT,LINE
TYPE,3
NSLL,S,1
ESLN,S,0
ESURF
ALLSEL
ESEL,ALL
ESEL,S,TYPE,,2
ESEL,A,TYPE,,3
ESEL,R,REAL,,3
/PSYMB,ESYS,1
/PNUM,TYPE,1
/NUM,1
EPLOT
ESEL,ALL
ESEL,S,TYPE,,2
ESEL,A,TYPE,,3
ESEL,R,REAL,,3
CMSEL,A,_NODECM
CMDEL,_NODECM
CMSEL,A,_ELEMCM
CMDEL,_ELEMCM
CMSEL,S,_KPCM
CMDEL,_KPCM
CMSEL,S,_LINECM
CMDEL,_LINECM
CMSEL,S,_AREACM
CMDEL,_AREACM
CMSEL,S,_VOLUCM
CMDEL,_VOLUCM
/GRES,cwz,gsav
CMDEL,_TARGET
CMDEL,_CONTACT
/COM, CONTACT PAIR CREATION - END

/com,------- Component
LSEL,s,line,,2
NSLL,s,1
CM,moveline,NODE
ALLSEL


/com solution process
/SOLU

NCNV,2
NLGEOM,on

NSEL,S,loc,x,0
D,all,ux,0
ALLSEL

NSEL,S,loc,y,-130
D,all,uy,0

/com, --coupling

CMSEL,S,moveline
CP,1,uy,all
ALLSEL

/com,-----LOADSTEP 1
TIME,1
CMSEL,s,moveline
D,all,uy,0
ALLSEL
SFL,2,pres,10
SFTRAN
NSUBST,10,20,5
AUTOTS,ON
OUTRES,ALL,ALL
SOLVE

/com,-----LOADSTEP 2
TIME,2
CMSEL,s,moveline
D,all,uy,-10
ALLSEL
NSUBST,10,20,5
AUTOTS,ON
OUTRES,ALL,ALL
SOLVE

/com,-----LOADSTEP 3
TIME,3
CMSEL,s,moveline
D,all,uy,-10.1
ALLSEL
NSUBST,20,100,10
AUTOTS,ON
OUTRES,ALL,ALL
SOLVE

/com,-----LOADSTEP 4
TIME,4
CMSEL,s,moveline
DDELE,all
ALLSEL
NSUBST,100,1000,50
AUTOTS,ON
OUTRES,ALL,ALL
SOLVE

/POST1

NSEL,S,,,1
PRNSOL,U,Y
allsel
LSEL,S,,,3
nsll,s,1
nplot
PRNSOL,CONT
allsel

PLNSOL, CONT,PRES, 0,1.0
