/com, ------- Shrink  fit condition
/com, ------- Shakeel Shajahan

FINISH
/CLEAR

/com, ------- Preprocessing
/PREP7

n=15 ! parameter for mesh

/com, -------- Material

MPTEMP,1,273

MPDATA,EX,1,1,110500
MPDATA,PRXY,1,1,0.26
MPDATA,DENS,1,1,7.2e-6
MPDATA,KXX,1,1,46.5
MPDATA,C,1,1,490
MPDATA,REFT,1,1,273
MPDATA,ALPX,1,1,13e-6


/com, ------- Elementtyps
ET,1,plane223 ! hub
KEYOPT,1,1,11
KEYOPT,1,3,1


MAT,1
K,1,40,0
K,2,95,0
K,3,95,60
K,4,40,60
A,1,2,3,4

LESIZE,1,,,n
LESIZE,2,,,n
LESIZE,3,,,n
LESIZE,4,,,n
AMESH,1
MSHKEY,1


/SOLU
ANTYPE,4

NSEL,S,loc,Y,0
D,all,uy,0
ALLSEL

DTRAN
GPLOT


TIME,100000
AUTOTS,OFF
DL,1,1,TEMP,373
DL,2,1,TEMP,373
DL,3,1,TEMP,373
DL,4,1,TEMP,373
kbc,0


DELTIM,6000,5000,100000,OFF
OUTRES,ALL,ALL
SOLVE

/POST1
PLNSOL, U,X,0,1,0
